# Literally all of this is copied from the tc.txt script used to compute conductivity
units metal
atom_style atomic
boundary p p p

read_data supercell-${sc}

# Masses (amu)
mass 1 39.948
mass 2 100.0

pair_style lj/cut 13.0
pair_coeff 1 1 0.02066 3.405
pair_coeff 1 2 0.01033 3.405
pair_coeff 2 2 0.01033 3.405

neighbor 2.0 bin
neigh_modify every 1 delay 0 check yes

# Only major difference is here where we dump in phonopy instead as per the documentation
dump phonopy all custom 1 force.${sc} id type x y z fx fy fz
dump_modify phonopy format line "%d %d %15.8f %15.8f %15.8f %15.8f %15.8f %15.8f"
run 0
