# Sample LAMMPS input script for thermal conductivity of solid Ar

units       real
atom_style  atomic

variable    T equal 70
variable    V equal vol
variable    dt equal 4.0
variable    p equal 200     # correlation length
variable    s equal 10      # sample interval
variable    d equal $p*$s   # dump interval
variable r equal 41026

# convert from LAMMPS real units to SI

variable    kB equal 1.3806504e-23    # [J/K] Boltzmann
variable    kCal2J equal 4186.0/6.02214e23
variable    A2m equal 1.0e-10
variable    fs2s equal 1.0e-15
variable    convert equal ${kCal2J}*${kCal2J}/${fs2s}/${A2m}

# setup problem

dimension    3
boundary     p p p

# light_heavy.txt
read_data    datafile.txt

mass 1 39.948
mass 2 100.0

pair_style   lj/cut 13.0
pair_coeff   * * 0.2381 3.405
timestep     ${dt}
thermo       $d

# equilibration and thermalization

# velocity     all create $T 102486 mom yes rot yes dist gaussian
velocity     all create $T $r mom yes rot yes dist gaussian

fix          NVT all nvt temp $T $T 10 drag 0.2
run          30000

#dump		1 all atom 2000 dump_read.tc

# thermal conductivity calculation, switch to NVE if desired

#unfix       NVT
#fix         NVE all nve

reset_timestep 0
compute      myKE all ke/atom
compute      myPE all pe/atom
compute      myStress all stress/atom NULL virial
compute      flux all heat/flux myKE myPE myStress
variable     Jx equal c_flux[1]/vol
variable     Jy equal c_flux[2]/vol
variable     Jz equal c_flux[3]/vol
fix          JJ all ave/correlate $s $p $d &
             c_flux[1] c_flux[2] c_flux[3] type auto file J0Jt.dat ave running
variable     scale equal ${convert}/${kB}/$T/$T/$V*$s*${dt}
variable     k11 equal trap(f_JJ[3])*${scale}
variable     k22 equal trap(f_JJ[4])*${scale}
variable     k33 equal trap(f_JJ[5])*${scale}
thermo_style custom step temp v_Jx v_Jy v_Jz v_k11 v_k22 v_k33

dump		1 all atom 2000 mix_dump.tc

run          100000
variable     k equal (v_k11+v_k22+v_k33)/3.0
variable     ndens equal count(all)/vol
variable     kx equal v_k11
variable     ky equal v_k22
variable     kz equal v_k33
print        "average conductivity: $k[W/mK] @ $T K, ${ndens} /A\^3"
print	     "Directional thermal conductivities: k_x = ${kx}, k_y = ${ky}, k_z = ${kz}"
